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# Московский государственный технический университет им. Н. Э. Баумана
# Расчёт турбины привода вентилятора.
# Студент - Нягин П. В.
#
# Группа - Э3 - 91
#
# Преподаватель - Моляков В. Д.
# Москва, 2018г.
# Определим максимальную частоту вращения ротора турбины. Выберем рабочую частоту вращения ротора турбины, основные размеры  (D_т, F_т, l_т/D_т) и форму меридионального сечения проточной части
# Из расчёта цикла ГТД имеем
T*_0 := 1.389*10^3  # K
T*_т := 1.173*10^3  # К
P*_0 := 9.422*10^5  # Па
P*_т := 4.158*10^5  # Па
L_т := 2.725*10^5  # Дж/кг  # Работа турбины
G := 114.517  # кг/с  # Расход газа через турбину
# α := 2.325  коэффициент избытка воздуха
R := 287.7  # Дж/(кг*К)  # гзовая постоянная продуктов сгорания керосина при α = 2.325
c_р := 1.2521*10^3  # Дж/(кг*К)  # Истинная теплоёмкость продуктов сгорания при средней температуре процесса расширения
k_г := c_р/(c_р - R) → 1.298  # Коэффициент адиабаты
# Решение:
Зададимся
λ := 0.45  # Приведёная скорость на выходе из рабочего колеса в первом приближении
π_гдф := (1 - (k_г - 1)/(k_г + 1)*λ^2)^(k_г/(k_г - 1)) = 0.890544
P_т := P*_т*π_гдф = 370288  # Па
T_т := T*_т*(1 - (k_г - 1)/(k_г + 1)*λ^2) = 1142.17  # К
# Степень понижения давления
π_т := P*_0/P_т explicit, ALL → 9.422*10^5/(3.703*10^5) = 2.5445
# Располагаемый теплоперепад
H_т := (c_р*T*_0*(1 - π_т^((1 - k_г)/k_г))) = 335887  # Дж/кг
# Абсолютная скорость после турбины
c_т := λ*sqrt(2*k_г/(k_г + 1)*R*T*_т) explicit, ALL → 0.45*sqrt(2*1.298/(1.298 + 1)*287.7*1.173*10^3) = 277.864  # м/с
# Лопаточный КПД
η_л := (L_т + c_т^2/2)/H_т explicit, ALL → (2.725*10^5 + 277.864^2/2)/(3.359*10^5) = 0.926216
# В первом приближении угол выхода потока из турбины
α_2 := 86.701 deg
# Удельный объем
# ν_т := R*T_т/P_т explicit, ALL → 287.7*1.142*10^3/(3.703*10^5) = 0.887422 м^3/кг
# Осевая скорость после турбины
c_та := c_т*sin(α_2) = 277.403  # м/с
# 6. Площадь кольцевого сечения
# A_т := G*ν_т/c_та explicit, ALL → 114.517*0.887/277.403 = 0.366343  м^2
# Максимальная частота вращения
# Напряжение при растяжении в РЛ примем
σ_л1 := 250  # МПа
# Примем
K_n := 6.8*10^-6
n_тmax := sqrt(σ_л1/(K_n*A_т)) explicit, ALL → sqrt(250/(6.8*10^-6*0.366)) = 10017.8  # об/мин
# Относительная длина рабочей лопатки
Примем
chem(l_2/D_т) := 1/6 = 0.166667
# Средний диаметр
D_т := sqrt(A_т/(π*chem(l_2/D_т))) explicit, ALL → sqrt(0.366/(π*0.167)) = 0.836459  # м
l_2 := D_т*chem(l_2/D_т) = 0.13941  # м
# Окружная скорость на диаметре D_т
u_т := π*D_т*n_тmax/60 explicit, ALL → π*0.836*1.002*10^4/60 = 438.748  # м/с
# Условная адиабатная скорость
c_0 := sqrt(2*H_т) explicit, ALL → sqrt(2*3.359*10^5) = 819.619  # м/с
u_т/c_0 = 0.535307
# Степень реактивности
ρ := 0.3  # Задаемся в зависимости от относительной длины лопатки
# Оптимальное отношение u/c_0 по КПД
# Обозначим его через
X_опт := 0.53
# Оптимальная по КПД окружная скорость
u_тη := c_0*X_опт explicit, ALL → 819.619*0.53 = 434.398  # м/с
# Соответствующий максимальному КПД средний диаметр турбины при выходе из рабочих лопаток
D_тη := 60*u_тη/(π*n_тmax) explicit, ALL → 60*434.398/(π*1.002*10^4) = 0.828166  # м
# Длина рабочей лопатки
l_лη := A_т/(π*D_тη) explicit, ALL → 0.366/(π*0.828) = 0.140806  # м
l_лη/D_тη = 0.170021
# Напряжение
K_u := K_n*3600/π = 0.00779223
σ_л := K_u*u_тη^2*(l_лη/D_тη) explicit, ALL → 7.792*10^-3*434.398^2*0.141/0.828 = 250  # МПа
# Форма мередионального сечения проточной части будет с потоянным средним диаметром.
## Часть 2
# Выполним расчёт ступени газовой турбины. Определим потери в проточной части и уточним коэффициенты φ и ψ.
# Степень реактивности выбираем исходя из значения относительной длины лопаток
l_лη/D_тη = 0.170021
ρ := (l_лη/D_тη - 1/9)*(0.3 - 0.2)/(1/6 - 1/9) + 0.2 = 0.306038  # Интерполяция по двум точкам
# 1. Располагаемый теплоперепад в СА
H_с := H_т*(1 - ρ) explicit, ALL → 3.359*10^5*(1 - 0.306) = 233093  # Дж/кг
# 2. Скорость за СА
# Зададимся коэффициентами скорости
φ := 0.9778
ψ := 0.9697
C_1 := sqrt(2*H_с)*φ explicit, ALL → sqrt(2*2.331*10^5)*0.978 = 667.62  # м/с
# 3. Средняя условная температура ступени
T_у := T*_0 - H_т*φ^2/(2*c_р) explicit, ALL → 1.389*10^3 - 3.359*10^5*0.978^2/(2*1.252*10^3) = 1260.76  # К
# 4. Температура за СА
T_1 := T*_0 - H_с*φ^2/c_р explicit, ALL → 1.389*10^3 - 2.331*10^5*0.978^2/(1.252*10^3) = 1211.01  # К
# 5. Температура в конце адиабатического расширения в СА
T'_1 := T*_0 - H_с/c_р explicit, ALL → 1.389*10^3 - 2.331*10^5/(1.252*10^3) = 1202.84  # К
# 6. Давление перед рабочими лопатками
P_1 := P*_0*(T'_1/T*_0)^(k_г/(k_г - 1)) explicit, ALL → 9.422*10^5*(1.203*10^3/(1.389*10^3))^(1.298/(1.298 - 1)) = 503685  # Па
# 7. Удельный объем перед рабочими лопатками
ν_1 := R*T_1/P_1 explicit, ALL → 287.7*1.211*10^3/(5.037*10^5) = 0.691719  # м^3/кг
# 8. Средняя скорость перед рабочими лопатками
# Задаемся углом потока за СА
α_1 := 20 deg
C_1a := C_1*sin(α_1) explicit, ALL → 667.62*sin(20*deg) = 228.34  # м/с
C_1u := C_1*cos(α_1) explicit, ALL → 667.62*cos(20*deg) = 627.358  # м/с
# 9. Кольцевая площадь сечения перед рабочими лопатками
A_1a := G*ν_1/C_1a explicit, ALL → 114.517*0.692/228.34 = 0.346911  # м^2
# 10. Относительная скорость при входе на рабочие лопатки
# Форма проточной части Dср=const
l_л1 := A_1a/(π*D_тη) = 0.133337  # м
b_ал := l_л1/3 = 0.0444457  # м
D_к1 := D_тη + l_л1 explicit, ALL → 0.828 + 0.133 = 0.961503  # м
D_вт1 := D_тη - l_л1 explicit, ALL → 0.828 - 0.133 = 0.694829  # м
D_c1 := D_тη = 0.828166  # м
u_1 := π*D_c1*n_тmax/60 explicit, ALL → π*0.828*1.002*10^4/60 = 434.398  # м/с
w_1 := sqrt(C_1^2 + u_1^2 - 2*C_1*u_1*cos(α_1)) explicit, ALL → sqrt(668^2 + 434^2 - 2*668*434*cos(20*deg)) = 298.952  # м/с
# 11. Угол входа потока на рабочие лопатки
β_1 := atan(C_1a/(C_1u - u_1)) explicit, ALL → atan(228.34/(627.358 - 434.398)) = 49.8003 deg
# 12. Длина сопловой лопатки на выходе
l_с := 0.974*l_л1 = 0.12987  # м
b_аc := l_с/1.7 = 0.0763943  # м
δ_a := b_аc*0.23 = 0.0175707  # м
# 13. Распологаемый теплоперепад в РК
H_л := ρ*H_т*T_1/T'_1 explicit, ALL → 0.306*3.359*10^5*1.211*10^3/(1.203*10^3) = 103493  # Дж/кг
# 14. Относительная скорость за рабочими лопатками
# Окружная скорость при выходе из рабочих лопаток
u_2 := u_тη = 434.398  # м/с
w_2 := ψ*sqrt(w_1^2 + 2*H_л + u_2^2 - u_1^2) explicit, ALL → 1*sqrt(299^2 + 2*1*10^5 + 434^2 - 434^2) = 527.893  # м/с
# 15. Температура за рабочими лопатками
T_2 := T_1 - (w_2^2 - w_1^2 - u_2^2 + u_1^2)/(2*c_р) explicit, ALL → 1*10^3 - (528^2 - 299^2 - 434^2 + 434^2)/(2*1*10^3) = 1135.42  # К
# 16. Температура в конце адиабатического расширения в рабочих лопатках
T'_2 := T_1 - H_л/c_р explicit, ALL → 1.211*10^3 - 1.035*10^5/(1.252*10^3) = 1128.36  # К
# 17. Давление за рабочими лопатками
P_2 := P_1*(T'_2/T_1)^(k_г/(k_г - 1)) explicit, ALL → 5.037*10^5*(1.128*10^3/(1.211*10^3))^(1.298/(1.298 - 1)) = 370288  # Па
# 18. Удельный объем за рабочими лопатками
ν_2 := R*T_2/P_2 explicit, ALL → 287.7*1.135*10^3/(3.703*10^5) = 0.882178  # м^3/кг
# 19. Площадь кольцевого сечения за рабочими лопатками
l_л2 := l_лη = 0.140806  # м
D_л2 := D_тη = 0.828166  # м
A_л2а := π*D_л2*l_л2 explicit, ALL → π*0.828*0.141 = 0.366343  # м^2
# 20. Осевая скорость за рабочими лопатками
C_2a := G*ν_2/A_л2а explicit, ALL → 114.517*0.882/0.366 = 275.764  # м/с
# 21. Угол выхода потока из рабочих лопаток
β_2 := asin(C_2a/w_2) explicit, ALL → asin(275.764/527.893) = 31.4925 deg
# 22. Скорость закрутки потока за рабочими лопатками
C_2u := w_2*cos(β_2) - u_2 explicit, ALL → 527.893*cos(0.55) - 434.398 = 15.7412  # м/с
# 23. Угол выхода потока из рабочих лопаток | Ранее α_2 = 86.701 deg
α_2 := atan(C_2a/C_2u) explicit, ALL → atan(275.764/15.741) = 86.733 deg
# 24. Скорость газа за рабочими лопатками
C_2 := sqrt(C_2a^2 + C_2u^2) explicit, ALL → sqrt(275.764^2 + 15.741^2) = 276.213  # м/с
# 25. Работа на окружности РК
C_1u := C_1*cos(α_1) explicit, ALL → 667.62*cos(20*deg) = 627.358  # м/с
L_u := C_1u*u_1 + C_2u*u_2 explicit, ALL → 627.358*434.398 + 15.741*434.398 = 279361  # Дж/кг
# 26. КПД на окружности РК
η_u := L_u/H_т explicit, ALL → 2.7936*10^5/(3.3589*10^5) = 0.83171
# 27. Удельные потери в СА
h_c := (φ^-2 - 1)*C_1^2/2 explicit, ALL → (0.978^-2 - 1)*667.62^2/2 = 10234.4  # Дж/кг
# 28. Удельные потери в СА с учетом их использования в рабочих лопатках
h‘_c := h_c*T'_2/T_1 explicit, ALL → 1.023*10^4*1.128*10^3/(1.211*10^3) = 9535.91  # Дж/кг
# 29. Относительные потери в СА
ξ_c := h_c/H_т explicit, ALL → 1.023*10^4/(3.359*10^5) = 0.0304699
# 30. Относительные потери в СА с учетом их использования в рабочих лопатках
ξ‘_c := ξ_c*T'_2/T_1 explicit, ALL → 0.03*1.128*10^3/(1.211*10^3) = 0.0283902
# 31. Удельные потери в рабочих лопатках
h_л := (ψ^-2 - 1)*w_2^2/2 explicit, ALL → (0.97^-2 - 1)*527.893^2/2 = 8843.62  # Дж/кг
# 32. Относительные потери в рабочих лопатках
ξ_л := h_л/H_т explicit, ALL → 8.844*10^3/(3.359*10^5) = 0.0263291
# 33. Удельные потери с выходной скоростью
h_в := C_2^2/2 explicit, ALL → 276.213^2/2 = 38146.9  # Дж/кг
# 34. Относительные потери с выходной скоростью
ξ_в := h_в/H_т explicit, ALL → 3.815*10^4/(3.359*10^5) = 0.11357
# 35. КПД на окружности РК | Ранее η_u = 0.83171
η_u := 1 - ξ‘_c - ξ_л - ξ_в explicit, ALL → 1 - 0.0284 - 0.0263 - 0.1136 = 0.83171
# 36. Удельные потери в радиальном зазоре
Зададимся
chem(δ_л/l_л2) := 0.0055
δ_л := chem(δ_л/l_л2)*l_л2 = 0.000774432  # м
h_з := 1.37*(1 + 1.6*ρ)*(1 + l_л2/D_л2)*L_u*chem(δ_л/l_л2)
h_з explicit, ALL → 1.37*(1 + 1.6*0.306)*(1 + 0.141/0.828)*2.794*10^5*5.5*10^-3 = 3668.85  # Дж/кг
h_з := 3.671*10^3
# 37. Относительные потери в радиальном зазоре
ξ_з := h_з/H_т explicit, ALL → 3.671*10^3/(3.359*10^5) = 0.0109293
# 38. Удельная работа ступени с учетом потери в радиальном зазоре
L_из := L_u - h_з explicit, ALL → 2.794*10^5 - 3.671*10^3 = 275690  # Дж/кг
# 39. Мощностной КПД ступени
η‘_т := η_u - ξ_з explicit, ALL → 0.832 - 0.011 = 0.820781
# 40. Лопаточный КПД ступени
η‘_л := η‘_т + ξ_в explicit, ALL → 0.821 + 0.114 = 0.934351
# 41. Затраты мощности на трение и вентиляцию
# Задаемся
ε := 1
ρ_1 := P_1/(R*T_1) explicit, ALL → 5.037*10^5/(287.7*1.211*10^3) = 1.44567  # кг/м^3
ρ_2 := P_2/(R*T_2) explicit, ALL → 3.703*10^5/(287.7*1.135*10^3) = 1.13356  # кг/м^3
ρ_ср := (ρ_1 + ρ_2)/2 explicit, ALL → (1.446 + 1.134)/2 = 1.28962  # кг/м^3
N_т.в. := 1000*(1.07*D_c1^2 + 61*(1 - ε)*D_c1*l_л2)*(u_2/100)^3*ρ_ср = 77578.6  # Вт
# 42. Удельные потери на трение и вентиляцию
h_т.в. := N_т.в./G explicit, ALL → 7.758*10^4/114.517 = 677.442  # Дж/кг
# 43. Относительные потери на трение и вентиляцию
ξ_т.в. := h_т.в./H_т explicit, ALL → 677.442/(3.359*10^5) = 0.00201687
# 44. Мощностной КПД ступени с учетом потери на трение и вентиляцию
η_т := η‘_т - ξ_т.в. explicit, ALL → 0.821 - 2.017*10^-3 = 0.818764
# 45. Лопаточный КПД ступени с учетом потерь на трение и вентиляцию
η_л := η‘_л - ξ_т.в. explicit, ALL → 0.934 - 2.017*10^-3 = 0.932335
# 46. Удельная работа ступени
L_т := H_т*η_т explicit, ALL → 3.359*10^5*0.819 = 275012  # Дж/кг
# 47. Температура за первой ступенью
T‘_ст := T_2 + h_з/c_р + h_т.в./c_р explicit, ALL → 1.135*10^3 + 3.671*10^3/(1.252*10^3) + 677.442/(1.252*10^3) = 1138.89  # К
# 48. Температура торможения за первой ступенью
T*_ст := T‘_ст + h_в/c_р explicit, ALL → 1.139*10^3 + 3.815*10^4/(1.252*10^3) = 1169.36  # К
# 49. Давление торможения за первой ступенью
P*_ст := P_2*(T*_ст/T‘_ст)^(k_г/(k_г - 1)) explicit, ALL → 3.703*10^5*(1.169*10^3/(1.139*10^3))^(1.298/(1.298 - 1)) = 415372  # Па
# 50. Располагаемый теплоперепад по параметрам торможения
H*_т := c_р*T*_0*(1 - (P*_ст/P*_0)^((k_г - 1)/k_г))
H*_т explicit, ALL → 1.2521*10^3*1.389*10^3*(1 - (4.1537193*10^5/(9.422*10^5))^((1.2983202 - 1)/1.2983202)) = 298348  # Дж/кг
H*_т := 2.9835054*10^5
# 51. КПД ступени по параметрам торможения
η*_т := L_т/H*_т explicit, ALL → 2.75*10^5/(2.984*10^5) = 0.921776
η_т = 81.8764 %
η_u = 83.171 %
η*_т = 92.1776 %
η_л = 93.2335 %
# _______________________________________________________________________________________________________
# 52. Механический КПД
η_м := 0.99
# 53. Мощность турбины
N := L_т*G*η_м explicit, ALL → 2.75*10^5*114.517*0.99 = 31178659  # Вт
# 54. Уточненное значение коэффициентов φ и ψ
# Зададимся
b_ал := l_л1/3 explicit, ALL → 0.133/3 = 0.0444457  # м
# Угол установки профиля
γ_л := (70 - 0.127*(β_1/deg - β_2/deg) - 0.0041*(β_1/deg - β_2/deg)^2)*deg
γ_л explicit, ALL → (70 - 0.127*(0.869/deg - 0.55/deg) - 4.1*10^-3*(0.869/deg - 0.55/deg)^2)*deg = 66.3007 deg
γ_л := 66.3043*deg
# Величина хорды
b_л := b_ал/sin(γ_л) explicit, ALL → 0.044/sin(66.304*deg) = 0.0485378  # м
K := 0.6  # для рабочей решётки
# Относительная максимальная толщина профиля для рабочих лопаток
c_maxотн := 0.2  # для рабочей решётки
t_л := b_л*K*(180/(180 - (β_1/deg + β_2/deg))*sin(β_1)/sin(β_2))^(1/3)*(1 - c_maxотн)
t_л explicit, ALL → 0.0485*0.6*(180/(180 - (0.8692/deg + 0.5496/deg))*sin(0.8692)/sin(0.5496))^(1/3)*(1 - 0.2) = 0.0323066  # м
t_л := 0.75*b_л = 0.0364033  # м  # Увеличим, так как слишком малый шаг в корне
# Определим потери на трение
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K_л := sin(β_1)/sin(β_2) = 1.46213
β_1 + β_2 = 81.2928 deg
ξ_трл := 0.02
# Кромочные потери
# Так как T*_0 = 1389  К, то примем лопатки охлаждаемыми
# Относительная толщина выходной кромки рабочей лопатки для охлаждаемой ступени
s_2лотн := 0.17
ξ_крл := 0.2*s_2лотн explicit, ALL → 0.2*0.17 = 0.034
# Профильные потери
ξ_прл := ξ_крл + ξ_трл explicit, ALL → 0.034 + 0.02 = 0.054
# Концевые потери
ξ_концл := 2*ξ_трл*t_л*sin(β_2)/l_л1 explicit, ALL → 2*0.02*0.036*sin(0.55)/0.133 = 0.00570483
# Суммарные потери
ξ_Σл := ξ_концл + ξ_прл explicit, ALL → 5.705*10^-3 + 0.054 = 0.0597048
# Уточненное значение
ранее
ψ = 0.9697
ψ := sqrt(1 - ξ_Σл) = 0.969688
# Зададимся
b_аc := l_с/1.7 explicit, ALL → 0.13/1.7 = 0.0763943  # м
α_0 := 90 deg
# Угол установки профиля
γ_с := (70 deg - 0.127*(α_0 - α_1) - 0.0041*(α_0 - α_1)^2)
γ_с explicit, ALL → 70*deg - 0.127*(90*deg - 20*deg) - 4.1*10^-3*(90*deg - 20*deg)^2 = 60.7594 deg
γ_с := 49.8 deg  # меняю, так как размер горла не получается при профилировании
# Величина хорды
b_с := b_аc/sin(γ_с) explicit, ALL → 0.0764/sin(49.8*deg) = 0.100019  # м
K := 0.45
c_maxотн := 0.2  # для сопловых лопаток
# Относительная максимальная толщина профиля для сопловых лопаток
# Шаг сопловых лопаток
t_с := b_с*K*(180 deg/(180 deg - (α_0 + α_1))*sin(α_0)/sin(α_1))^(1/3)*(1 - c_maxотн)
t_с explicit, ALL → 0.1*0.45*(180*deg/(180*deg - (90*deg + 20*deg))*sin(90*deg)/sin(20*deg))^(1/3)*(1 - 0.2) = 0.0705386  # м
t_с := 0.0705
# Определим потери на трение
sin(α_0)/sin(α_1) = 2.9238
ξ_трc := 0.016
# по графику. Сумма углов
α_1 + α_0 explicit, ALL → 20*deg + 90*deg = 110 deg
# Кромочные потери
# Относительная толщина выходной кромки сопловой лопатки для охлаждаемой ступени
s_2cотн := 0.11
ξ_крc := 0.2*s_2cотн explicit, ALL → 0.2*0.11 = 0.022
# Профильные потери
ξ_прc := ξ_крc + ξ_трc explicit, ALL → 0.022 + 0.016 = 0.038
# Концевые потери
ξ_концc := 2*ξ_трc*t_с*sin(α_1)/l_с explicit, ALL → 2*0.016*0.071*sin(20*deg)/0.13 = 0.00594129
# Суммарные потери
ξ_Σc := ξ_концc + ξ_прc explicit, ALL → 5.941*10^-3 + 0.038 = 0.0439413
# Уточненное значение
ранее
φ = 0.9778
φ := sqrt(1 - ξ_Σc) = 0.977783
# Расчёт повторяем до сходимости по φ и ψ.
# Профилирование лопаток по радиусу
# Закон профилирования:
α_1 == const
# Угол выхода из СА:
α_1 = 20 deg
# Средний радиус СА и РК:
r_ср := D_тη/2 explicit, ALL → 0.828/2 = 0.414083  # м
# Длина лопатки на входе в СА
l_с0 := 0.116  # м
# Корневой радиус
r_к := D_тη/2 - l_с0/2 explicit, ALL → 0.828/2 - 0.116/2 = 0.356083  # м
# Периферийный радиус СА:
r_п := D_тη/2 + l_с0/2 explicit, ALL → 0.828/2 + 0.116/2 = 0.472083  # м
# Окружная скорость на выходе из СА на среднем радиусе:
C_1u = 627.358  # м/c
# Абсолютная скорость на выходе из СА на среднем радиусе:
C_1 = 667.62  # м/c
# Распределение давления по радиусу
P_ст(r) := P_1*(1 + (k_г - 1)/2*C_1^2/(k_г*R*T'_1)*(1 - (r_ср/r)^(2*cos(α_1)^2)))^(k_г/(k_г - 1))
P_ст(r_ср) = 503685  # Па
# Степень понижения давления в РК
π_рк(r) := P_ст(r)/P_2
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# Осевая скорость за СА: | Окружная скорость за СА: | Полная скорость за СА:
c_1a(r) := C_1a*(r_ср/r)^(cos(α_1)^2)
c_1u(r) := C_1u*(r_ср/r)^(cos(α_1)^2)
c_1(r) := C_1*(r_ср/r)^(cos(α_1)^2)
c_1a(r_к) = 260.886  # м/c
c_1u(r_к) = 716.779  # м/c
c_1(r_к) = 762.78  # м/c
c_1a(r_ср) = 228.34  # м/c
c_1u(r_ср) = 627.358  # м/c
c_1(r_ср) = 667.62  # м/c
c_1a(r_п) = 203.381  # м/c
c_1u(r_п) = 558.784  # м/c
c_1(r_п) = 594.646  # м/c
# Адиабатическая скорость за СА:
c_1ад(r) := c_1(r)/φ
c_1ад(r_к) = 780.112  # м/c
c_1ад(r_ср) = 682.79  # м/c
c_1ад(r_п) = 608.157  # м/c
# Теплоперепад на СА:
# Теплоперепад на РК:
H_с(r) := c_1ад(r)^2/2
H_рк(r) := (H_т - H_с(r))*T_1/T'_1
H_с(r_к) = 304288
H_рк(r_к) = 31814.4
H_с(r_ср) = 233101  # Дж/кг
H_рк(r_ср) = 103485  # Дж/кг
H_с(r_п) = 184928
H_рк(r_п) = 151985
# Степень реактивности
ρ_r(r) := 1 - (1 - ρ)*(r_ср/r)^(2*cos(α_1)^2)
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ρ_r(r_к) = 0.0941104
ρ_r(r_ср) = 0.306038
ρ_r(r_п) = 0.449455
# Окружная скорость:
u(r) := u_тη*r/r_ср
u(r_к) = 373.552
u(r_ср) = 434.398  # м/c
u(r_п) = 495.243
# Угол выхода потока из СА в относительном движении
β_1(r) := atan(c_1a(r)/(c_1(r)*cos(α_1) - u(r)))
β_1(r_к) = 37.2384 deg
β_1(r_ср) = 49.8003 deg
β_1(r_п) = 72.65 deg
# Окружная скорость на выходе из РК
c_2u(r) := L_u/u(r) - c_1u(r)
c_2u(r_к) = 31.0703
c_2u(r_ср) = 15.7412  # м/c
c_2u(r_п) = 5.30398
# Относительная скорость за СА:
w_1(r) := sqrt(c_1(r)^2 + u(r)^2 - 2*c_1(r)*u(r)*cos(α_1))
w_1(r_к) = 431.122
w_1(r_ср) = 298.952  # м/с
w_1(r_п) = 213.076
# Относительная скорость за РК:
w_2(r) := ψ*sqrt(w_1(r)^2 + 2*H_рк(r))
w_2(r_к) = 484.354
w_2(r_ср) = 527.872  # м/с
w_2(r_п) = 573.16
# Окружная составляющая относительной скорости за РК:
w_2u(r) := c_2u(r) + u(r)
w_2u(r_к) = 404.623
w_2u(r_ср) = 450.139  # м/с
w_2u(r_п) = 500.547
# Осевая составляющая относительной скорости за РК:
w_2a(r) := sqrt(w_2(r)^2 - w_2u(r)^2)
w_2a(r_к) = 266.232
w_2a(r_ср) = 275.723  # м/с
w_2a(r_п) = 279.223
# Осевая составляющая абсолютной скорости за РК:
c_2a(r) := w_2a(r)
# Полная абсолютная скорость за РК:
c_2(r) := sqrt(c_2a(r)^2 + c_2u(r)^2)
c_2(r_к) = 268.039
c_2(r_ср) = 276.172  # м/с
c_2(r_п) = 279.273
# Угол выхода потока из РК в относительном движении:
β_2(r) := atan(w_2a(r)/w_2u(r))
β_2(r_к) = 33.3439 deg
β_2(r_ср) = 31.4887 deg
β_2(r_п) = 29.1543 deg
# Угол выхода потока из РК в абсолютном движении:
α_2(r) := atan(c_2a(r)/c_2u(r))
α_2(r_к) = 83.3435 deg
α_2(r_ср) = 86.7325 deg
α_2(r_п) = 88.9118 deg
# Число лопаток в СА: | Число лопаток в РК:
z_с := π*D_тη/t_с explicit, ALL → π*0.83/0.07 = 36.9044
z_рк := π*D_тη/t_л explicit, ALL → π*0.83/0.04 = 71.4704
z_с := 37
z_рк := 71
# Пересчитаем шаг решетки СА и РК:
t_ск := π*2*r_к/z_с explicit, ALL → π*2*0.3561/37 = 0.0604686  # м
t_ркк := π*2*r_к/z_рк explicit, ALL → π*2*0.3561/71 = 0.0315118  # м
t_с := π*2*r_ср/z_с explicit, ALL → π*2*0.4141/37 = 0.0703179  # м
t_рк := π*2*r_ср/z_рк explicit, ALL → π*2*0.4141/71 = 0.0366445  # м
t_сп := π*2*r_п/z_с explicit, ALL → π*2*0.4721/37 = 0.0801672  # м
t_ркп := π*2*r_п/z_рк explicit, ALL → π*2*0.4721/71 = 0.0417773  # м
# Средний диаметр
# СА | РК
# Осевая протяжённость
# лопаток:, м:
b_аc = 0.0763943
b_ал = 0.0444457
# Шаг, м:
t_с = 0.0703179
t_рк = 0.0366445
# Хорда, м:
b_с = 0.100019
b_л = 0.0485378
# Газовые углы:
α_0 := 90 deg
β_1(r_ср) = 49.8003 deg
α_1 = 20 deg
β_2(r_ср) = 31.4887 deg
# Горло, м
a_c.ср := t_с*sin(α_1) = 0.0240501
a_рк.ср := t_рк*sin(β_2(r_ср)) = 0.0191405
# Радиус входной
# кромки, м
r_1CA := 0.039*b_аc = 0.00297938
r_1RK := 0.036*b_ал = 0.00160005
# Толщина выходной
# кромки, м
s_2с := 0.0023
s_2л := 0.0025
# Максимальная
# толщина профиля, м
C_c := b_с*0.2 = 0.0200039
C_л := b_л*0.2 = 0.00970756
# Втулочный диаметр.
# СА | РК
# Осевая протяжённость
# лопаток:, м:
b_аc = 0.0763943
b_ал = 0.0444457
# Шаг, м:
t_с.к := π*r_к*2/z_с = 0.0604686
t_рк.к := π*r_к*2/z_рк = 0.0315118
# Хорда, м:
b_с.к := t_с.к/0.65 = 0.0930285
b_к := t_рк.к/0.63 = 0.0500187
# Газовые углы:
α_0к := 90 deg
β_1(r_к) = 37.2384 deg
α_1к := α_1 = 20 deg
β_2(r_к) = 33.3439 deg
# Горло, м
a_c.к := t_с.к*sin(α_1) = 0.0206815
a_рк.к := t_рк.к*sin(β_2(r_к)) = 0.0173209
# Периферийный диаметр.
# СА | РК
# Осевая протяжённость
# лопаток:, м:
b_аc = 0.0763943
b_ал = 0.0444457
# Шаг, м:
t_с.п := π*r_п*2/z_с = 0.0801672
t_рк.п := π*r_п*2/z_рк = 0.0417773
# Хорда, м:
b_с.п := t_с.п/0.749 = 0.107032
b_рк.п := t_рк.п/0.733 = 0.0569949
# Газовые углы:
α_0п := 90 deg
β_1(r_п) = 72.65 deg
α_1п := α_1 = 20 deg
β_2(r_п) = 29.1543 deg
# Горло, м
a_c.п := t_с.п*sin(α_1) = 0.0274188
a_рк.п := t_рк.п*sin(β_2(r_п)) = 0.0203523
# Проекции скоростей, м/с
c_1a(r_к) = 260.886
c_1u(r_к) = 716.779
c_1(r_к) = 762.78
c_1a(r_ср) = 228.34
c_1u(r_ср) = 627.358
c_1(r_ср) = 667.62
w_1u(r) := c_1u(r) - u(r)
c_1a(r_п) = 203.381
c_1u(r_п) = 558.784
c_1(r_п) = 594.646
u(r_к) = 373.552
w_1u(r_к) = 343.227
w_1(r_к) = 431.122
u(r_ср) = 434.398
w_1u(r_ср) = 192.96
w_1(r_ср) = 298.952
u(r_п) = 495.243
w_1u(r_п) = 63.5409
w_1(r_п) = 213.076
c_2a(r_к) = 266.232
c_2u(r_к) = 31.0703
c_2(r_к) = 268.039
c_2a(r_ср) = 275.723
c_2u(r_ср) = 15.7412
c_2(r_ср) = 276.172
c_2a(r_п) = 279.223
c_2u(r_п) = 5.30398
c_2(r_п) = 279.273
w_2a(r_к) = 266.232
w_2u(r_к) = 404.623
w_2(r_к) = 484.354
w_2a(r_ср) = 275.723
w_2u(r_ср) = 450.139
w_2(r_ср) = 527.872
w_2a(r_п) = 279.223
w_2u(r_п) = 500.547
w_2(r_п) = 573.16
# Расчёт на прочность пера рабочей лопатки
n_т := n_тmax = 10017.8  # об/мин
F_пер := 212.99*10^-6  # м^2
F_ср := 330.10*10^-6  # м^2
F_вт := 452.492314*10^-6  # м^2
R_пер := r_п = 0.472083  # м
R_ср := r_ср = 0.414083  # м
R_вт := r_к = 0.356083  # м
# Зададим распределение площадей плавной кривой:
Given
# начальное приближение
a := 1
b := 1
c := 1
a + b*R_вт^c == F_вт
a + b*R_ср^c == F_ср
a + b*R_пер^c == F_пер
[a; b; c] := Find([a; b; c]) = [0.00157428; -0.00227849; 0.686224]
F(z) := a + b*z^c
z := 0, 0.002 .. (R_пер + 0.01)
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м^2
м
# Плотность материала лопатки ЖС50:
ρ := 8850  # кг/м^3
# Частота вращения ротора:
ω := 2*π*n_т/60 = 1049.06  # c^-1
N(z) := ρ*ω^2*integral(z_1*F(z_1), z_1 = z .. R_пер + 0.01)
σ_р(z) := N(z)/F(z)
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м
Па
σ_р(R_вт) = 357275222  # Па
R_вт = 0.356083  # м
# Изгибающие моменты от аэродинамических сил:
# Давление перед рабочим колесом:
P_1(r) := P_ст(r)
# Распределение давления по радиусу
# Давление за рабочим колесом:
P_2 = 370288  # Па
# Температура перед РК:
ORIGIN := 0
T_1 = 1211.01  # К
# Температура за РК:
T_2 = 1135.42  # К
# Плотность газа перед рабочей лопаткой
ρ_1(r) := P_1(r)/(R*T_1)
# Плотность газа за рабочей лопаткой:
ρ_2 := P_2/(R*T_2) = 1.13356  # кг/м^3
# Количество лопаток:
m := 71
C_1a := [203.4646; 228.433; 260.9918]
C_2a := [278.5198; 275.0175; 265.5072]
C_1u := [559.0145; 627.6145; 717.0691]
C_2u := [5.4339; 15.893; 31.2514]  # м/с
z := [472.1*10^-3; 414.1*10^-3; 356.1*10^-3]  # м
u := [495.2415; 434.3978; 373.5542]  # м/с
Н/м
q_x :=
    for i ∈ 0 .. 2
        q_x[i] ← (-P_2 + P_1(z[i]))*2*π*z[i]/m + 2*π*z[i]/m*(C_1a[i]^2*ρ_1(z[i]) - C_2a[i]^2*ρ_2)
    q_x
    = [7698.49; 4512.02; 1330.77]
q_y :=
    for i ∈ 0 .. 2
        q_y[i] ← 2*π*z[i]/m*(C_1a[i]*ρ_1(z[i])*(C_1u[i] - u[i]) - C_2a[i]*ρ_2*(C_2u[i] - u[i]))
    q_y
    = [7354.23; 7119.55; 6586.72]  # Н/м
vz := stack(356.1*10^-3, 414.1*10^-3, 472.1*10^-3)
vq_x := stack(1.3275*10^3, 4.5113*10^3, 7.7006*10^3)
vs1 := lspline(vz, vq_x)
q_x(z) := interp(vs1, vz, vq_x, z)
vq_y := stack(6.5868*10^3, 7.1203*10^3, 7.3552*10^3)
vs := lspline(vz, vq_y)
q_y(z) := interp(vs, vz, vq_y, z)
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м
м
# Н/м | Н/м
M_ξq(z) := -(z*integral(q_y(z_1), z_1 = z .. R_пер + 0.01) - integral(z_1*q_y(z_1), z_1 = z .. R_пер + 0.01))
M_ξq(R_вт) = 57.3066  # Н*м
M_ηq(z) := (integral(z_1*q_x(z_1), z_1 = z .. R_пер + 0.01) - z*integral(q_x(z_1), z_1 = z .. R_пер + 0.01))
M_ηq(R_вт) = 47.1531  # Н*м
φ_В := 31.767128
M_u := M_ξq(R_вт)*cos(φ_В*deg) + M_ηq(R_вт)*sin(φ_В*deg) = 73.5463  # Н*м
M_v := -M_ξq(R_вт)*sin(φ_В*deg) + M_ηq(R_вт)*cos(φ_В*deg) = 9.91926  # Н*м
I_u.В := 8375.971197*10^-12 = 8.37597e-9  # м^4
I_v.В := 75589.099219*10^-12 = 7.55891e-8  # м^4
# Определим положение нейтральной линии:
β := atan(M_v*I_u.В/(M_u*I_v.В)) = 0.856218 deg  # Практически совпадает с осью U
# Точка А
v_A := 11.890*10^-3  # м
u_A := (-14.2858)*10^-3  # м
σ_A := M_u*v_A/I_u.В - M_v*u_A/I_v.В = 106276418  # Па
# Точка B
v_B := 7.2017*10^-3 = 0.0072017  # м
u_B := 30.8513*10^-3  # м
σ_B := M_u*v_B/I_u.В - M_v*u_B/I_v.В = 59187006  # Па
# Точка С
v_C := -8.5692*10^-3  # м
u_C := -5.3063*10^-3  # м
σ_C := M_u*v_C/I_u.В - M_v*u_C/I_v.В = -74546692  # Па
# Наиболее опасная точка А
σ_Σ := σ_р(R_вт) + σ_A = 463551640  # Па
σ_р(R_вт) = 357275222
σ_р(R_вт) = 357275222  # Па
# Примем материал ЖС50
# В качестве критерия работоспособности выберем длительную прочность при температуре 1273 К на 100 часов
# Предел текучести:
σ_дл := 315*10^6  # Па
σ_дл/σ_Σ explicit, ALL → 315*10^6/(4.64*10^8) = 0.679536
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