T_г.торм := 1773
η_т.торм := 0.91
η_л := 0.88
# Значения истинных удельных теплоёмкостей:
# при α=10000 формула принимает следующий вид:
C_p(T) :=
    (0.2407 + 0.0193*(2.5*10^-3*T - 0.875) + 2.0*10^-3*(2.5*10^-5*T^2 - 0.0275*T + 6.5625))*4187 if T < 750
    (0.26 + 0.032*(1.176*10^-3*T - 0.88235) + (-1)*0.374*10^-2*(5.5556*10^-6*T^2 + (-1)*1.3056*10^-2*T + 6.67))*4187 if T ≥ 750
k_г := 1.33
R_г := 289.3
π_к.торм := 20
G_г := 61.529
g_охл.са := 0.02
π_т := 19.014
G_в := 61.529
g_охл.рк := 0.03
k_г := 19.014
C_pг := 1238
π_т.твд := 4.275
L_к := 453500
P_г.торм := 1946*10^3
# Расход рабочего тела  в горле СА
G_г0 := G_г + G_в*g_охл.са/2 = 62.1443
# Удельная работа турбины, Дж/кг
L_т.твд := C_pг*T_г.торм*(1 - π_т.твд^((1 - k_г)/k_г))*η_т.торм = 1493093
# Скорость выхода потока из турбины ТВД
c_тa := 170
# Располагаемый теплоперепад в ТВД, Дж/кг:
H_0т.твд := (L_т.твд + c_тa^2/2)/η_л = 1713117
# Степень понижения  полного давления в турбине компрессора:
π_твд := (1 - H_0т.твд/(C_pг*T_г.торм))^(k_г/(1 - k_г)) = 4.95527
# Температура за ТВД, K:
T_т.твд := T_г.торм - H_0т.твд*η_л/C_pг = 555.275
# Статическое давление за турбиной компрессора, Па
P_т.твд := P_г.торм*(1 - H_0т.твд/(C_pг*T_г.торм))^(k_г/(k_г - 1)) = 392713
# Расчет ТВД на максимальную частоту вращения
σ_dop := 150
ρ_м := 8400
μ := 3.5
k_n1 := 2*π*ρ_м/(3600*(1 + ln(μ))) = 6.5079
k_n := 6.508*10^-6
# Удельный объём газа за турбиной:
ν_т := R_г*T_т.твд/P_т.твд = 0.409054  # м^3/кг
# Площадь сечения турбины при выходе из рабочего колеса последней ступени турбины
F_т.твд := G_г0*ν_т/c_тa = 0.149532  # м^2
# Максимальная частота вращения ТВД:
n_т.max.твд := sqrt(σ_dop/(k_n*F_т.твд)) = 12415.2  # об/мин
# Расчет числа ступеней турбины ТВД
# Относительная длина лопатки:
l_отн == l_т/D_т
l_отн.твд := 1/7.1
# Диаметр турбины, м:
D_т.твд := sqrt(F_т.твд/(π*l_отн.твд)) = 0.581328
# Длина рабочей лопатки, м:
l_т.твд := D_т.твд*l_отн.твд = 0.0818771
# Окружная скорость на среднем диаметре, м/c:
u_т := π*D_т.твд*n_т.max.твд/60 = 377.898
# Расчёт параметров соответствующих максимальному КПД
# Адиабатическая скорость:
c_0 := sqrt(2*H_0т.твд) = 1851.01
# Число ступеней:
# оптимальное отношение:
y_0 := 0.52
# коэффициент использования скорости:
μ := 1
# скорость за первой ступенью, м/с:
c_21 := 120
# средняя скорость за ступенями:
c_2cp := sqrt(0.5*(c_21^2)) = 84.8528
z_твд := ((c_0/(μ*c_2cp))^2 - 1)/((u_т/(μ*c_2cp*y_0))^2 - 1) = 6.5633
# Теплоперепады по ступеням, Дж/кг:
H_1.твд := H_0т.твд = 1713117
# 2.3 Поступенчатый расчет турбины ТВД
# Расчет первой ступени
# Располагаемые теплоперепад первой ступени, Дж/кг:
H_1.твд := H_1.твд*1.02
# Степень реактивности:
ρ_1.твд := 0.23
# Коэффициент скорости:
φ_1.твд := 0.97
# Располагаемый теплоперепад в СА, Дж/кг:
H_с1.твд := H_1.твд*(1 - ρ_1.твд) = 1345482
# Угол потока за СА:
α_11.твд := 14 deg
# Скорость за СА, м/с:
c_11.твд := φ_1.твд*sqrt(2*H_с1.твд) = 1591.2
# Температура за СА, К:
T_с1.твд := T_г.торм - H_с1.твд*φ_1.твд^2/C_pг = 750.412
# Температура в конце адиабатного расширения в СА, К:
T'_с1.твд := T_г.торм - H_с1.твд/C_pг = 686.181
# Давление за СА, Па:
P_с1.твд := P_г.торм*(1 - H_с1.твд/(C_pг*T_г.торм))^(k_г/(k_г - 1)) = 714474
# Удельный объём за СА,  : | м^3/кг
ν_с1.твд := R_г*T_с1.твд/P_с1.твд = 0.303852
# Плотность за СА  : | кг/м^3
ρ_с1.твд := P_с1.твд/(R_г*T_с1.твд) = 3.29108
# Длина сопловой лопатки, м:
l_с1.твд := G_г*ν_с1.твд/(π*D_т.твд*sin(α_11.твд)*c_11.твд) = 0.0265931
# Длина рабочей лопатки:
l_л1.твд := 0.061
# Ширина рабочих лопаток (l/b=1.5...2), м:
b_aл1.твд := l_л1.твд/1.5 = 0.0406667
# Ширина сопловой лопатки (l/b=1...1.5), м:
b_aс1.твд := l_с1.твд/1.1 = 0.0241756
# Осевой зазор за сопловой лопаткой, м:
δ_ас1.твд := 0.31*b_aс1.твд = 0.00749443
# Осевой зазор за рабочими лопатками, м:
δ_ал1.твд := 0.23*b_aл1.твд = 0.00935333
# Радиальный зазор за сопловой лопаткой, м:
δ_rс1.твд := 0.0085*l_с1.твд = 0.000226042
# Радиальный зазор за рабочими лопатками, м:
δ_rл1.твд := 0.0085*l_л1.твд = 0.0005185
# Кольцевая площадь сечения перед рабочими лопатками(РЛ),  :
м^2
F_1a.твд := π*D_т.твд*l_с1.твд = 0.0485669
# Средняя скорость перед РЛ, м/с:
c_11a.твд := G_г*ν_с1.твд/F_1a.твд = 384.947
# Угол потока за СА(проверяется):
α_11.твд := asin(c_11a.твд/c_11.твд) = 14 deg  # => (верно)
# Окружная составляющая абсолютной скорости за СА, м/с:
c_11u.твд := c_11.твд*cos(α_11.твд) = 1543.94
# Относительная скорость при входе в РЛ, м/с:
w_11.твд := sqrt(c_11.твд^2 + u_т^2 - 2*c_11.твд*u_т*cos(α_11.твд)) = 1227.94
# Средний угол входа потока на лопатки РЛ:
β_11.твд := atan(c_11a.твд/(c_11.твд*cos(α_11.твд) - u_т)) = 18.2697 deg
β_11.твд :=
    atan(c_11a.твд/(c_11.твд*cos(α_11.твд) - u_т)) if c_11.твд*cos(α_11.твд) - u_т > 0
    90 deg + atan(c_11a.твд/(c_11.твд*cos(α_11.твд) - u_т)) if c_11.твд*cos(α_11.твд) - u_т < 0
β_11.твд = 18.2697 deg
# Располагаемый теплоперепад в РК, Дж/кг:
H_л1.твд := ρ_1.твд*H_1.твд*T_с1.твд/T'_с1.твд = 439518
# Коэффициент скорости ψ1:
ψ_1.твд := 0.964
# Относительная скорость за РЛ, м/c:
w_21.твд := ψ_1.твд*sqrt(w_11.твд^2 + 2*H_л1.твд + (u_т^2 - u_т^2)) = 1489.33
# Температура за РЛ, К:
T_21.твд := T_с1.твд + w_11.твд^2/(2*C_pг) + (u_т^2 - u_т^2)/(2*C_pг) - w_21.твд^2/(2*C_pг) = 463.548
# Температура в конце адиабатного расширения в РЛ, К:
T'_21.твд := T_с1.твд - H_л1.твд/C_pг = 395.389
# Давление за РЛ, Па:
P_21.твд := P_с1.твд*(T'_21.твд/T_с1.твд)^(k_г/(k_г - 1)) = 363299
# Удельный объём за РЛ,  : | м^3/кг
υ_21.твд := R_г*T_21.твд/P_21.твд = 0.36913
# Плотность за РЛ,  : | кг/м^3
ρ_21.твд := P_21.твд/(R_г*T_21.твд) = 2.70907
# Площадь кольцевого сечения за РЛ,  : | м^2
F_лa1.твд := π*D_т.твд*l_л1.твд = 0.111404
# Осевая скорость за РЛ, м/c:
c_21a.твд := G_г*υ_21.твд/F_лa1.твд = 203.872
# Угол выхода потока из рабочих лопаток:
β_21.твд := asin(c_21a.твд/w_21.твд) = 7.86784 deg
# Скорость закрутки потока за РЛ, м/c:
c_21u.твд := w_21.твд*cos(β_21.твд) - u_т = 1097.41
# Абсолютная скорость за РЛ, м/c:
c_21.твд := sqrt(c_21a.твд^2 + c_21u.твд^2) = 1116.19
# Угол выхода потока из РЛ:
α_21.твд := atan(c_21a.твд/c_21u.твд) = 10.5242 deg
α_21.твд :=
    atan(c_21a.твд/c_21u.твд) if c_21u.твд > 0
    180 deg + atan(c_21a.твд/c_21u.твд) if c_21u.твд < 0
α_21.твд = 10.5242 deg
# Работа на окружности РК, Дж:
L_u1.твд := c_11u.твд*u_т + c_21u.твд*u_т = 998162
# КПД на окружности РК:
η_u1.твд := L_u1.твд/H_1.твд = 0.571233
# Удельные потери в СА, Дж/кг:
h_с1.твд := (φ_1.твд^-2 - 1)*c_11.твд^2/2 = 79518
# С учётом их использования в рабочих лопатках, Дж/кг:
h'_с1.твд := h_с1.твд*T'_21.твд/T_с1.твд = 41897.8
# Относительные потери в СА:
ξ_с1.твд := h_с1.твд/H_1.твд = 0.045507
# С учётом их использования в рабочих лопатках:
ξ'_с1.твд := ξ_с1.твд*T'_21.твд/T_с1.твд = 0.0239775
# Удельные потери в рабочих лопатках, Дж/кг:
h_л1.твд := (1/ψ_1.твд^2 - 1)*w_21.твд^2/2 = 84380.6
# Относительные потери в рабочих лопатках:
ξ_л1.твд := h_л1.твд/H_1.твд = 0.0482898
# Удельные потери с выходной скоростью, Дж/кг:
h_в1.твд := c_21.твд^2/2 = 622940
# Относительные потери с выходной скоростью:
ξ_в1.твд := h_в1.твд/H_1.твд = 0.356499
# КПД на окружности колеса:
η_u1.твд := 1 - ξ'_с1.твд - ξ_л1.твд - ξ_в1.твд = 0.571233
# Удельные потери в радиальном зазоре, Дж/кг:
h_з1.твд := 1.37*(1 + 1.6*ρ_1.твд)*(1 + l_л1.твд/D_т.твд)*L_u1.твд*δ_rл1.твд/l_л1.твд = 17569.6
# Относительные потери в радиальном зазоре:
ξ_з1.твд := h_з1.твд/H_1.твд = 0.0100548
# Плотность  : | кг/м^3
ρ_ср1.твд := (ρ_с1.твд + ρ_21.твд)/2 = 3.00008
# Затраты мощности на трение, Вт:
N_т.в1.твд := (1.07*D_т.твд^2)*(u_т/100)^3*ρ_ср1.твд*10^3 = 58544
# Удельные потери на трение, Дж/кг:
h_т.в1.твд := N_т.в1.твд/G_г = 951.486
# Относительные потери на трение:
ξ_т.в1.твд := h_т.в1.твд/H_1.твд = 0.000544521
# Мощностной КПД:
η_т1.твд := η_u1.твд - ξ_з1.твд - ξ_т.в1.твд = 0.560634
# Лопаточный КПД:
η_л1.твд := η_u1.твд - ξ_з1.твд + ξ_в1.твд - ξ_т.в1.твд = 0.917133
# Удельная работа ступени, Дж/кг:
L_т1.твд := H_1.твд*η_т1.твд = 979641
# Температура за ступенью:
T_ст1.твд := T_21.твд + h_з1.твд/C_pг + h_т.в1.твд/C_pг = 478.509
# Температура торможения за ступенью, К:
T_ст1.торм.твд := T_ст1.твд + h_в1.твд/C_pг = 981.691
# Давление торможения за ступенью, Па:
P_ст1.торм.твд := P_21.твд*(T_ст1.торм.твд/T_ст1.твд)^(k_г/(k_г - 1)) = 775664
# Располагаемый теплоперепад по параметрам торможения, Дж/кг:
H_1.торм.твд := C_pг*T_г.торм*(1 - (P_ст1.торм.твд/P_г.торм)^((k_г - 1)/k_г)) = 1276706
# КПД ступени по параметрам торможения:
η_т1.торм.твд := L_т1.твд/H_1.торм.твд = 0.767319
# Проверка соотношения КПД для первой ступени:
# КПД ступени по параметрам торможения: | Лопаточный КПД:
# Мощностной КПД: | КПД на окружности колеса:
η_т1.твд = 0.560634  # <
η_u1.твд = 0.571233  # <
η_т1.торм.твд = 0.767319  # <
η_л1.твд = 0.917133
# 2.4 Проверка коэффициентов скорости
# Сопловой аппарат первой ступени
# Уточнение коэффициента φ
η_л1.твд := (L_т1.твд + h_в1.твд)/H_1.твд
# Вход в ступень осевой,поэтому:
α_01.твд := 90 deg
(α_01.твд + α_11.твд) = 104 deg
# Коэффициент,учитывающий форму канала:
k_с1.твд := sin(β_11.твд)/sin(β_21.твд) = 2.29011
# Коэффициент потерь от трения на профиле(из графика):
ζ_с.тр1.твд := 0.018
# Угол установки профиля:
γ_с1.твд := (70 - 0.127*(α_01.твд/deg - α_11.твд/deg) + (-1)*0.0041*(α_01.твд/deg - α_11.твд/deg)^2)*deg = 36.6664 deg
# Хорда профиля, м:
b_c1.твд := b_aс1.твд/sin(γ_с1.твд) = 0.0404846
# Относительная толщина профиля:
c__с.max1.твд := 0.13
# Шаг, м:
t_с1.твд := 0.45*b_c1.твд*(180 deg/(180 deg - (α_01.твд + α_11.твд))*sin(α_01.твд)/sin(α_11.твд))^(1/3)*(1 - c__с.max1.твд) = 0.0339065
# Относительная толщина выходной кромки(из таблицы):
s__с1.твд := 0.11
# Кромочные потери:
ζ_с.кр1.твд := 0.2*s__с1.твд = 0.022
# Профильные потери
ζ_с.пр1.твд := ζ_с.тр1.твд + ζ_с.кр1.твд = 0.04
# Концевые потери
ζ_с.к1.твд := 2*ζ_с.пр1.твд*t_с1.твд*sin(α_11.твд)/l_с1.твд = 0.0246762
# Суммарные потери:
ζ_с1.твд := ζ_с.пр1.твд + ζ_с.к1.твд = 0.0646762
φ_1.твд := sqrt(1 - ζ_с1.твд) = 0.967121
# Уточнение коэффициента ψ
# Рабочая лопатка первой ступени:
(β_11.твд + β_21.твд) = 26.1375 deg
k_л1.твд := sin(β_11.твд)/sin(β_21.твд) = 2.29011
# Коэффициент потерь от трения на профиле(из графика)
ζ_л.тр1.твд := 0.017
# Угол установки профиля:
γ_л1.твд := (70 - 0.127*(β_11.твд/deg - β_21.твд/deg) + (-1)*0.0041*(β_11.твд/deg - β_21.твд/deg)^2)*deg = 68.2353 deg
# Хорда профиля, м:
b_л1.твд := b_aл1.твд/sin(γ_л1.твд) = 0.0437881
# Относительная толщина профиля:
c__л.max1.твд := 0.2
# Шаг, м:
t_л1.твд := b_л1.твд*0.6*(180 deg/(180 deg - (β_11.твд + β_21.твд))*sin(β_11.твд)/sin(β_21.твд))^(1/3)*(1 - c__л.max1.твд) = 0.029192
# Относительная толщина выходной кромки:
s__л1.твд := 0.17
# Кромочные потери:
ζ_л.кр1.твд := 0.2*s__л1.твд = 0.034
# Профильные потери:
ζ_л.пр1.твд := ζ_л.тр1.твд + ζ_л.кр1.твд = 0.051
# Концевые потери:
ζ_л.к1.твд := 2*ζ_л.пр1.твд*t_л1.твд*sin(β_21.твд)/l_л1.твд = 0.00668191
# Суммарные потери:
ζ_л1.твд := ζ_л.пр1.твд + ζ_л.к1.твд = 0.0576819
ψ_1.твд := sqrt(1 - ζ_л1.твд) = 0.970731
# Распределение степени реактивности по радиусу для ступени
# Основные размеры ступени:
r_ср := 0.5*D_т.твд = 0.290664  # м
# Втулочный и периерийный радиусы СА: | Втулочный и периферийный радиусы РК:
r_с1вт := r_ср - 0.5*l_с1.твд = 0.277367  # м
r_р1вт := r_ср - 0.5*l_л1.твд = 0.260164  # м
r_с1п := r_ср + 0.5*l_с1.твд = 0.30396  # м
r_р1п := r_ср + 0.5*l_л1.твд = 0.321164  # м
# Распределение давления по радиусу
P_ст(r) := P_с1.твд*(1 + (k_г - 1)/2*c_11u.твд^2/(k_г*R_г*T'_с1.твд)*(1 - ((r_ср/r)^(cos(α_11.твд)^2))^2))^(k_г/(k_г - 1))
P_ст(r_ср) = 714474  # Па
# Степень реактивности
ρ_1(r) := 1 - (1 - ρ_1.твд)*(r_ср/r)^(2*cos(α_11.твд)^2)
ρ_1(r_с1п) = 0.292197
ρ_1(r_ср) = 0.23
ρ_1(r_р1вт) = 0.0512681
# 2.5.Профилирование ступени
# Закон профилирования
α_1 == const
# Окружная скорость за СА: | Осевая скорость за СА:
c_1u(r) := c_11u.твд*(r_ср/r)^(cos(α_11.твд)^2)
c_1a(r) := c_11a.твд*(r_ср/r)^(cos(α_11.твд)^2)
c_1a(r_с1вт) = 402.297  # м/с
c_1u(r_с1вт) = 1613.52  # м/с
c_1a(r_ср) = 384.947  # м/с
c_1u(r_ср) = 1543.94  # м/с
c_1a(r_с1п) = 369.073  # м/с
c_1u(r_с1п) = 1480.27  # м/с
# Полная скорость за СА:
c_1(r) := c_11.твд*(r_ср/r)^(cos(α_11.твд)^2)
c_1(r_с1вт) = 1662.92  # м/с
c_1(r_ср) = 1591.2  # м/с
c_1(r_с1п) = 1525.59  # м/с
# Угол в абсолютном движении за СА | Угол в абсолютном движении перед СА:
α_11.твд = 14 deg
α_0(r) := 90 deg
# Угол установки профиля СА
γ_с1(r) :=
    ((70 - 0.127*(α_0(r)/deg - α_11.твд/deg) + (-1)*0.0041*(α_0(r)/deg - α_11.твд/deg)^2)*deg) if α_0(r) ≥ 0
    ((70 - 0.127*((π + α_0(r))/deg - α_11.твд/deg) + (-1)*0.0041*((π + α_0(r))/deg - α_11.твд/deg)^2)*deg) if α_0(r) < 0
γ_с1(r_с1вт) = 36.6664 deg
γ_с1(r_ср) = 36.6664 deg
γ_с1(r_с1п) = 36.6664 deg
# Окружная скорость:
u(r) := u_т*r/r_ср
u(r_с1вт) = 360.611
u(r_ср) = 377.898
u(r_с1п) = 395.185
# Угол выхода потока из СА в относительном движении
β_1(r) := atan(c_1a(r)/(c_1(r)*cos(α_11.твд) - u(r)))
β_1(r) :=
    atan(c_1a(r)/(c_1(r)*cos(α_11.твд) - u(r))) if c_1(r)*cos(α_11.твд) - u(r) > 0
    180 deg + atan(c_1a(r)/(c_1(r)*cos(α_11.твд) - u(r))) if c_1(r)*cos(α_11.твд) - u(r) < 0
β_1(r_с1вт) = 17.8013 deg
β_1(r_ср) = 18.2697 deg
β_1(r_с1п) = 18.7848 deg
# Окружная скорость на выходе из РК
L_u1.твд = 998162
c_2u(r) := L_u1.твд/u(r) - c_1u(r)
c_2u(r_р1вт) = 1237.22
c_2u(r_ср) = 1097.41
c_2u(r_р1п) = 985.011
# Относительная скорость за СА:
w_1(r) := sqrt(c_1(r)^2 + u(r)^2 - 2*c_1(r)*u(r)*cos(α_11.твд))
w_1(r_с1вт) = 1315.92
w_1(r_ср) = 1227.94  # м/с
w_1(r_с1п) = 1146.13
# Относительная скорость за РК:
H_рк(r) := ρ_1(r)*H_1.твд*T_с1.твд/T'_с1.твд
w_2(r) := ψ_1.твд*sqrt(w_1(r)^2 + 2*H_рк(r))
w_2(r_р1вт) = 1462.76  # м/с
w_2(r_ср) = 1499.73  # м/с
w_2(r_р1п) = 1529.31  # м/с
# Окружная составляющая относительной скорости за РК:
w_2u(r) := c_2u(r) + u(r)
w_2u(r_р1вт) = 1575.47
w_2u(r_ср) = 1475.31  # м/с
w_2u(r_р1п) = 1402.56  # м/с
# Осевая составляющая относительной скорости за РК:
w_2a(r) := sqrt(w_2(r)^2 - w_2u(r)^2)
w_2a(r_р1вт) = 585.181i
w_2a(r_ср) = 269.529
w_2a(r_р1п) = 609.605
# Осевая составляющая абсолютной скорости за РК:
c_2a(r) := w_2a(r)
# Полная абсолютная скорость за РК:
c_2(r) := sqrt(c_2a(r)^2 + c_2u(r)^2)
c_2(r_р1вт) = 1090.08  # м/с
c_2(r_ср) = 1130.03  # м/с
c_2(r_р1п) = 1158.39  # м/с
# Угол выхода потока из РК в относительном движении:
β_2(r) := atan(w_2a(r)/w_2u(r))
β_2(r_р1вт) = 22.3502i deg
β_2(r_ср) = 10.3534 deg
β_2(r_р1п) = 23.4915 deg
# Угол установки профиля лопатки РК:
γ_рк1(r) :=
    ((70 - 0.127*(β_1(r)/deg - β_2(r)/deg) + (-1)*0.0041*(β_1(r)/deg - β_2(r)/deg)^2)*deg) if β_1(r) ≥ 0
    ((70 - 0.127*((π + β_1(r))/deg - β_2(r)/deg) + (-1)*0.0041*((π + β_1(r))/deg - β_2(r)/deg)^2)*deg) if β_1(r) < 0
γ_рк1(r_р1вт) = (68.6355 + 6.00116i) deg
γ_рк1(r_ср) = 68.7377 deg
γ_рк1(r_р1п) = 70.4388 deg
# Угол выхода потока из РК в абсолютном движении:
α_21(r) := atan(c_2a(r)/c_2u(r))
α_21(r) :=
    atan(c_2a(r)/c_2u(r)) if c_2u(r) > 0
    90 deg + atan(c_2a(r)/c_2u(r)) if c_2u(r) < 0
α_21(r_р1вт) = 29.4444i deg
α_21(r_ср) = 13.7989 deg
α_21(r_р1п) = 31.7526 deg
# Угол в абсолютном движении перед СА
α_0(r) := α_21(r)
# Окружная скорость:
u(r) := u_т*r/r_ср
u(r_р1вт) = 338.244  # м/с
u(r_ср) = 377.898  # м/с
u(r_р1п) = 417.552  # м/с
t_с1.твд = 0.0339065
# Число лопаток в СА:
t_л1.твд = 0.029192
z_с := π*D_т.твд/t_с1.твд = 53.8626
z_с := 35
# Число лопаток в РК:
z_рк := π*D_т.твд/t_л1.твд = 62.5616
z_рк := 68
# Пересчитаю шаг решетки СА и РК:
t_свт := π*2*r_с1вт/z_с = 0.0497928  # м
t_ср := π*2*r_ср/z_с = 0.0521798  # м
t_сп := π*2*r_с1п/z_с = 0.0545668  # м
t_рвт := π*2*r_р1вт/z_рк = 0.0240391  # м
t_рк := π*2*r_ср/z_рк = 0.0268573  # м
t_рп := π*2*r_р1п/z_рк = 0.0296755  # м
# СА втулочное сечение | СА среднее сечение | СА периферийное сечение
# Ширина лопаток:, м:
b_aс1.твд.вт := 0.051  # м
b_aс1.твд = 0.0241756  # м
b_aс1.твд.п := 0.051  # м
# Хорда, м:
b_c1.твд = 0.0404846
# Угол входа:
α_0 := 90 deg
α_0 = 90 deg
α_0 = 90 deg
# Угол выхода:
α_11.твд = 14 deg
α_11.твд = 14 deg
α_11.твд = 14 deg
# Шаг, м:
t_свт = 0.0497928  # м
t_ср = 0.0521798  # м
t_сп = 0.0545668  # м
# Радиус скругления входной кромки, м:
r_1CA.вт := 0.045*b_aс1.твд = 0.0010879
r_1CA := 0.04*b_aс1.твд = 0.000967024
d_1CA.вт := 2*r_1CA = 0.00193405
d_1CA := 2*r_1CA = 0.00193405
# Горло
a_c.вт := t_свт*sin(α_11.твд) = 0.012046
a_c.п := t_сп*sin(α_11.твд) = 0.0132009
a_c.ср := t_ср*sin(α_11.твд) = 0.0126234
C_maxc1 := c__л.max1.твд*46.9 = 9.38
# РК втулочное сечение | РК среднее сечение | РК периферийное сечение
# Хорда, м:
b_л1.твд = 0.0437881  # м
# Ширина лопаток:, м:
b_aл1.твд = 0.0406667  # м
b_aл1.твд.вт := b_л1.твд*sin(γ_рк1(r_р1вт)) = 0.041003 + 0.00167387i  # м
b_aл1.твд.п := b_л1.твд*sin(γ_рк1(r_р1п)) = 0.0412609  # м
# Угол входа в относительном движении:
β_1(r_с1вт) = 17.8013 deg
β_1(r_ср) = 18.2697 deg
β_1(r_с1п) = 18.7848 deg
# Угол выхода в относительном движении:
β_2(r_р1вт) = 22.3502i deg
β_2(r_ср) = 10.3534 deg
β_2(r_р1п) = 23.4915 deg
# Шаг, м:
t_рвт = 0.0240391  # м
t_рк = 0.0268573  # м
t_рп = 0.0296755  # м
# Радиус скругления входной кромки, м:
r_1RK.вт := 0.06*b_aл1.твд = 0.00244
r_1RK := 0.03*b_aл1.твд = 0.00122
d_1RK.вт := 2*r_1RK.вт = 0.00488
d_1RK := 2*r_1RK = 0.00244
# Горло
a_рк.к := t_рвт*sin(β_2(r_р1вт)) = 0.00961692i
a_рк.п := t_рп*sin(β_2(r_р1п)) = 0.011829
a_рк.ср := t_рк*sin(β_2(r_ср)) = 0.00482675
