σ_вх := 0.99
N_e := 32*10^6
T*_а := 288
η_г := 0.99
T*_г := 1773
σ_г := 0.99
p*_а := 101300
η*_т1 := 0.86
η_м := 0.99
σ_вых := 0.99
Q_н := 48800*10^3
η*_к.п := 0.91
η*_т.п := 0.9
η_л := 0.9
R_в := 287.4
k_в := 1.4
T*_в := T*_а = 288
p_а := p*_а
p*_в := p*_а*σ_вх = 100287  # Па
p*_к(π*_к) := p*_а*σ_вх*π*_к
η*_к(π*_к) := (π*_к^((k_в - 1)/k_в) - 1)/(π*_к^((k_в - 1)/(k_в*η*_к.п)) - 1)
# Температура за компрессором:
C_pви(T) :=
    (0.2407 + 0.0193*(2.5*10^-3*T - 0.875) + 2.0*10^-3*(2.5*10^-5*T^2 - 0.0275*T + 6.5625))*4187 if T < 750
    (0.26 + 0.032*(1.176*10^-3*T - 0.88235) - 0.374*10^-2*(5.5556*10^-6*T^2 - 1.3056*10^-2*T + 6.67))*4187 if T ≥ 750
T*_к(π*_к) := T*_а*(1 + (π*_к^((k_в - 1)/k_в) - 1)/η*_к(π*_к))
# Значения истинной теплоёмкости по средней температуре:
C_pв(π*_к) := C_pви((T*_к(π*_к) + T*_а)/2)
k_в(π*_к) := C_pв(π*_к)/(C_pв(π*_к) - R_в)
# КПД компрессора через политропический КПД:
η*_к(π*_к) := (π*_к^((k_в(π*_к) - 1)/k_в(π*_к)) - 1)/(π*_к^((k_в(π*_к) - 1)/(k_в(π*_к)*η*_к.п)) - 1)
# Температура за компрессором:
T*_к(π*_к) := T*_а*(1 + (π*_к^((k_в(π*_к) - 1)/k_в(π*_к)) - 1)/η*_к(π*_к))
# Удельная работа компрессора:
L_к(π*_к) := R_в*k_в(π*_к)/(k_в(π*_к) - 1)*T*_а*(π*_к^((k_в(π*_к) - 1)/k_в(π*_к)) - 1)/η*_к(π*_к)
# Степень понижения давления турбин:
# Давление газа перед турбиной:
p*_г(π*_к) := p*_к(π*_к)*σ_г
p_т := p_а/σ_вых = 102323
# В первом приближении примем | Теплоемкость, Дж/кг*К:
l_0 := 16.85
k_г := 1.33
R_г := 289.3
C_pг := k_г*R_г/(k_г - 1) = 1165.97
π_т(π*_к) := p*_г(π*_к)/p_т
C_pги(T, α) :=
    ((0.0174/α + 0.2407) + (0.0093/α + 0.0193)*(2.5*10^-3*T - 0.875) + (2.0*10^-3 - 1.056*10^-3/(α - 0.2))*(2.5*10^-5*T^2 - 0.0275*T + 6.5625))*4187 if T < 750
    ((0.0267/α + 0.26) + (0.0133/α + 0.032)*(1.176*10^-3*T - 0.88235) - (0.94*10^-2/(α^2 + 10) + 0.374*10^-2)*(5.5556*10^-6*T^2 - 1.3056*10^-2*T + 6.67))*4187 if T ≥ 750
C_pсчп(T) :=
    (3.45/10^5*(T - 70) + 0.236)*4187 if T < 700
    (3.45/10^5*(T + 450) + 0.218)*4187 if T ≥ 700
C_pсв(T) :=
    (1.2/10^5*(T - 70) + 0.236)*4187 if T < 700
    (2.2/10^5*(T + 450) + 0.218)*4187 if T ≥ 700
g_m(π*_к) := (C_pсв(T*_г)*T*_г - C_pсв(T*_к(π*_к))*T*_к(π*_к))/(Q_н*η_г - (1 + l_0)*(C_pсчп(T*_г)*T*_г - C_pсчп(288)*288) + l_0*(C_pсв(T*_г)*T*_г - C_pсв(288)*288))
α_Σ(π*_к) := 1/(g_m(π*_к)*l_0)
T_т(π*_к) := T*_г*(1 - (1 - π_т(π*_к)^((1 - k_г)/k_г))*η_л)
T_ср(π*_к) := (T_т(π*_к) + T*_г)/2
C_pг(π*_к) := C_pги(T_ср(π*_к), α_Σ(π*_к))
k_г(π*_к) := C_pг(π*_к)/(C_pг(π*_к) - R_г)
# Параметры газа по тракту ГТУ для оптимальной степени повышения давления:
# Оптимальная степень повышения давления:
π*_к := 20
k_в1 := 1.386
# Параметры компрессора:
# Давление за компрессором:
p*_к := p*_а*σ_вх*π*_к = 2005740  # Па
# КПД компрессора через политропический КПД:
η*_к := (π*_к^((k_в1 - 1)/k_в1) - 1)/(π*_к^((k_в1 - 1)/(k_в1*η*_к.п)) - 1) explicit, ALL → (20^((1.386 - 1)/1.386) - 1)/(20^((1.386 - 1)/(1.386*0.91)) - 1) = 0.868044
# Температура за компрессором:
T*_к := T*_а*(1 + (π*_к^((k_в1 - 1)/k_в1) - 1)/η*_к) explicit, ALL → 288*(1 + (20^((1.386 - 1)/1.386) - 1)/0.868) = 720.384
# Удельная работа компрессора:
L_к := R_в*k_в1/(k_в1 - 1)*T*_а*(π*_к^((k_в1 - 1)/k_в1) - 1)/η*_к explicit, ALL → 287.4*1.386/(1.386 - 1)*288*(20^((1.386 - 1)/1.386) - 1)/0.868 = 446202
# Давление газа перед турбиной:
p*_г := p*_к*σ_г = 1985683  # Па
# Статическое давление за силовой турбиной:
p_т := p_а/σ_вых = 102323  # Па
# Степень понижения давления обоих турбин:
π_т := p*_г/p_т = 19.406
# Средняя удельная теплоемкость чистых продуктов сгорания керосина:
# При температуре за камерой сгорания
c_pгс1 := 1.191*10^3  # Дж/(кг*К)
# При температура калориметрирования
c_pгс2 := 1.02*10^3  # Дж/(кг*К)
# Средняя удельная теплоемкость воздуха:
# При температуре за камерой сгорания
c_pвс1 := 1.09*10^3  # Дж/(кг*К)
# При температуре за компрессором
c_pвс2 := 1.021*10^3  # Дж/(кг*К)
# При температура калориметрирования
c_pвс3 := 999.085  # Дж/(кг*К)
# Коэффициент удельного расхода топлива:
g_m := (c_pвс1*T*_г - c_pвс2*T*_к)/(Q_н*η_г - (1 + l_0)*(c_pгс1*T*_г - c_pгс2*288) + l_0*(c_pвс1*T*_г - c_pвс3*288)) = 0.0274692
# Относительный расход газа:
# Утечки:
g_ут := 0.007
# Относительный расход воздуха на охлаждение:
g_охл := 0.05
g_т := (1 + g_m)*(1 - g_ут - g_охл) = 0.968903
# Истинная удельная теплоёмкость продуктов сгорания:
C_pг := C_pг(π*_к) = 1273.28  # Дж/(кг*К)
# Истинный показатель адиабаты:
k_г := k_г(π*_к) = 1.29401
# Статическая температура за турбинами
T_т := T*_г*(1 - (1 - π_т^((1 - k_г)/k_г))*η_л) explicit, ALL → 1.773*10^3*(1 - (1 - 19.406^((1 - 1.294)/1.294))*0.9) = 990.732  # К
# Удельная работа турбин:
L_т := C_pг*T*_г*(1 - π_т^((1 - k_г)/k_г))*η_л explicit, ALL → 1.273*10^3*1.773*10^3*(1 - 19.406^((1 - 1.294)/1.294))*0.9 = 996046  # Дж/кг
# Удельная мощность установки:
g_воз := 0.04
N_е.уд := (L_т*((1 + g_m)*(1 - g_ут - g_охл) + g_воз)*η_м - L_к) = 548662  # Вт/кг
# Расход воздуха
G_в := N_e/N_е.уд explicit, ALL → 32*10^6/(5.487*10^5) = 58.3237  # кг/с
# Расход газа при входе в турбину
G_г := (1 + g_m)*(1 - g_ут - g_охл)*G_в explicit, ALL → (1 + 0.027)*(1 - 7*10^-3 - 0.05)*58.324 = 56.51  # кг/с
# Давление торможения за турбиной привода компрессора:
p*_тк := p*_г*(1 - L_к/(C_pг*T*_г*η*_т1*η_м*g_т))^(k_г/(k_г - 1)) explicit, ALL → 1.986*10^6*(1 - 4.462*10^5/(1.273*10^3*1.773*10^3*0.86*0.99*0.969))^(1.294/(1.294 - 1)) = 594770
# Степень понижения давления турбины привода компрессора:
π*_тк := p*_г/p*_тк explicit, ALL → 1.986*10^6/(5.948*10^5) = 3.33857
# Температура за турбиной привода компрессора:
T*_тк := T*_г*(1 - (1 - π*_тк^((1 - k_г)/k_г))*η*_т1) explicit, ALL → 1.773*10^3*(1 - (1 - 3.339^((1 - 1.294)/1.294))*0.86) = 1407.66  # К
# Работа турбины привода компрессора:
L_тк := C_pг*T*_г*(1 - π*_тк^((1 - k_г)/k_г))*η*_т1 explicit, ALL → 1.273*10^3*1.773*10^3*(1 - 3.339^((1 - 1.294)/1.294))*0.86 = 465175  # Дж/кг
# Параметры силовой турбины:
# Степень понижения давления силовой турбины:
π_тс := p*_тк/p_т explicit, ALL → 5.948*10^5/(1.023*10^5) = 5.81266
# Работа силовой турбины:
L_тс := C_pг*T*_тк*(1 - π_тс^((1 - k_г)/k_г))*η*_т1 explicit, ALL → 1.273*10^3*1.408*10^3*(1 - 5.813^((1 - 1.294)/1.294))*0.86 = 508068
с_т.а := 180
# Располагаемый теплоперепад:
Н_т := (L_тк + с_т.а^2/2)/η_л explicit, ALL → (4.652*10^5 + 180^2/2)/0.9 = 534861
# Температура за турбиной:
Т_т := T*_г - Н_т*η_л/C_pг = 1394.94  # К
# Статическое давление за турбиной:
p_т := p*_г*(1 - Н_т/(C_pг*T*_г))^(k_г/(k_г - 1)) = 604036  # Па
# Степень понижения давления:
π_т := p*_г/p_т = 3.28736
# Удельный обьем:
v_t := R_г*Т_т/p_т = 0.668099
# Площадь кольцевого сечения:
А_т := G_г*v_t/с_т.а = 0.209746
# Допустимые напряжения растяжения в рабочих лопатках:
σ_л := 250  # МПа
к_з := 1.3
# Коэффициент пропорциональности k_n :
k_n := 6.8*10^-6
# Максимальная частота вращения:
# Частота вращения
n_т.max := sqrt(σ_л/(к_з*k_n*А_т)) = 11611.7  # об/мин
n_т := 0.95*n_т.max
# Основные размеры многоступенчатой турбины
l_отн := 1/11
# Средний диаметр последней ступени
D_т := sqrt(А_т/(π*l_отн)) = 0.856975  # м
# Длина лопатки на диаметре
l_л := А_т/(π*D_т) = 0.0779069  # м
# Окружная скорость на диаметре D_т
U_т := π*D_т*n_т/60 = 494.98  # м/c^2
# Средний диаметр при выходе из СА первой ступени:
n_тк := n_т/60
D_1 := D_т = 0.856975  # м
# Окружная скорость на диаметре D_1:
U_1 := π*D_1*n_тк explicit, ALL → π*0.857*0.95*1.161*10^4/60 = 494.98  # м/c^2
# Средняя окружная скорость по турбине:
U_ср := U_т = 494.98  # м/c^2
# Оптимальное отношения для выбранной степени реактивности:
y_0 := 0.55
# Условная адиабатная скорость:
С_0 := sqrt(2*Н_т) = 1034.27
# Средняя скорость за ступенями:
C_2ср := 250
# Коэффициент использования скорости:
μ := 1
# Число ступеней:
z := 1
# Коэффициент возврата теплоты;
C_21 := 175
α := (z - 1)/(2*z)*(π_т^((k_г - 1)/k_г) - 1)*(1 - η_л) = 0
# Теплоперепад на первой  ступени:
H_01 := Н_т*(1 + α)*2*0.5/2 + ((μ*C_21)^2)/2 explicit, ALL → 5.349*10^5*(1 + 0)*2*0.5/2 + 175^2/2 = 282743
# Распределение степеней пеактивности по ступеням:
ρ_1 := 0.15
# Располагаемый теплоперепад в СА первой ступени
H_с1 := H_01*(1 - ρ_1) explicit, ALL → 2.827*10^5*(1 - 0.15) = 240332
# Угол потока за СА 1-й ступени:
α_11 := 14.43 deg
# Скорость за СА 1-ой ступени:
φ_1 := 0.967
c_11 := φ_1*sqrt(2*H_с1) explicit, ALL → 0.967*sqrt(2*2.403*10^5) = 670.42  # м/с
c_1а := c_11*sin(α_11) explicit, ALL → 670.42*sin(14.43*deg) = 167.067  # м/с
# Температура за CA 1-ой ступени:
T_c1 := T*_г - H_с1*φ_1^2/C_pг explicit, ALL → 1.773*10^3 - 2.403*10^5*0.967^2/(1.273*10^3) = 1596.5  # К
# Давление за СА 1-ой ступенью:
p_c1 := p*_г*(1 - H_с1/(C_pг*T*_г))^(k_г/(k_г - 1)) explicit, ALL → 1.986*10^6*(1 - 2.403*10^5/(1.273*10^3*1.773*10^3))^(1.294/(1.294 - 1)) = 1209915  # Па
# Удельный объём газа за турбиной:
ν_c1 := R_г*T_c1/p_c1 explicit, ALL → 289.3*1.597*10^3/(1.21*10^6) = 0.381736  # м^3/кг
# Длина на выходе сопловой лопатки 1-ой ступени:
l_c1 := G_г*ν_c1/(sin(α_11)*D_т*π*c_11) explicit, ALL → 56.51*0.382/(sin(14.43*deg)*0.857*π*670.42) = 0.0479601  # м
# Длины рабочих и сопловых лопаток по ступеням:
l_л1 := 0.065
l_c1 = 0.0479601  # м
l_л2 := l_л = 0.0779069  # м
l_c2 := 0.08  # м
# Ширина рабочей лопатки по ступеням:
b_л1 := l_л1/1.8 explicit, ALL → 0.065/1.8 = 0.0361111
b_л2 := l_л2/2 explicit, ALL → 0.078/2 = 0.0389534
# Ширина сопловой лопатки:
b_с1 := 1.2*b_л1 = 0.0433333  # м
b_с2 := 1.2*b_л2 = 0.0467441  # м
# Осевой зазор за сопловыми  лопатками по ступеням:
δ_ас1 := 0.25*b_с1 = 0.0108333  # м
δ_ас2 := 0.2*b_с2 = 0.00934882  # м
# Осевой зазор за рабочими  лопатками по ступеням:
δ_ал1 := 0.25*b_л1 = 0.00902778  # м
δ_ал2 := 0.2*b_л2 = 0.00779069  # м
# Поступенчатый расчет турбины
# Располагаемый теплоперепад в СА:
H_11 := H_01*(1 - ρ_1) explicit, ALL → 2.827*10^5*(1 - 0.15) = 240332
# Приведённая скорость:
λ_СА1 := c_11/sqrt(2*k_г/(k_г + 1)*R_г*T*_г) explicit, ALL → 670.42/sqrt(2*1.294/(1.294 + 1)*289.3*1.773*10^3) = 0.881317
# Окружная составляющая скорости за СА первой ступени:
c_11u := c_11*cos(α_11) explicit, ALL → 670.42*cos(14.43*deg) = 649.27
# Температура за СА:
T_11 := T*_г - H_11*φ_1^2/C_pг explicit, ALL → 1.773*10^3 - 2.403*10^5*0.967^2/(1.273*10^3) = 1596.5
# Температура в конце адиабатного расширения в СА:
T'_11 := T*_г - H_11/C_pг explicit, ALL → 1.773*10^3 - 2.403*10^5/(1.273*10^3) = 1584.25
# Давление перед рабочими лопатками:
p_11 := p*_г*(T'_11/T*_г)^(k_г/(k_г - 1)) explicit, ALL → 1.986*10^6*(1.584*10^3/(1.773*10^3))^(1.294/(1.294 - 1)) = 1209915
# Кольцевая площадь сечения перед рабочими лопатками:
А_11 := π*D_1*l_c1 explicit, ALL → π*0.857*0.048 = 0.129121
# Удельный объем перед рабочими лопатками:
ν_11 := R_г*T_11/p_11 explicit, ALL → 289.3*1.597*10^3/(1.21*10^6) = 0.381736
# Осевая скорость перед рабочими лопатками:
с_11а := c_1а = 167.067
# Относительная скорость при входе в рабочие лопатки:
w_11 := sqrt(c_11^2 + U_т^2 - 2*c_11*U_т*cos(α_11)) explicit, ALL → sqrt(670.42^2 + 494.98^2 - 2*670.42*494.98*cos(14.43*deg)) = 227.413
# Угол входа потока на рабочие лопатки:
β_11 := atan(с_11а/(c_11*cos(α_11) - U_т))/deg explicit, ALL → atan(167.067/(670.42*cos(14.43*deg) - 494.98))/deg = 47.2768
# Располагаемый теплоперепад в РК:
Н_12 := ρ_1*H_01*T_11/T'_11 explicit, ALL → 0.15*2.827*10^5*1.597*10^3/(1.584*10^3) = 42739.4
# Окружная скорость при входе на рабочие лопатки:
u_1 := U_т = 494.98  # м/с
# Диаметр на входе из рабочих лопаток
D_2 := D_1 - 0 = 0.856975
# Окружная скорость на выходе из рабочих лопаток:
u_2 := π*D_2*n_т/60 explicit, ALL → π*0.857*0.95*1.161*10^4/60 = 494.98
# Коэффициент скорости в рабочих лопатках:
ψ_1 := 0.955
# Относиельная скорость за рабочими лопатками:
w_12 := ψ_1*sqrt(w_11^2 + 2*Н_12 + u_2^2 - u_1^2) explicit, ALL → 0.955*sqrt(227.413^2 + 2*4.274*10^4 + 494.98^2 - 494.98^2) = 353.731
# Температура за рабочими лопатками:
T_12 := T_11 - (w_12^2 - w_11^2 - u_2^2 + u_1^2)/(2*C_pг) explicit, ALL → 1.597*10^3 - (353.731^2 - 227.413^2 - 494.98^2 + 494.98^2)/(2*1.273*10^3) = 1567.68
# Температура к конце адиабатного расширения в рабочих лопатках:
T'_12 := T_11 - Н_12/C_pг explicit, ALL → 1.597*10^3 - 4.274*10^4/(1.273*10^3) = 1562.94
# Давление за рабочими лопатками:
p_12 := p_11*(T'_12/T_11)^(k_г/(k_г - 1)) explicit, ALL → 1.21*10^6*(1.563*10^3/(1.597*10^3))^(1.294/(1.294 - 1)) = 1101891
# Удельный объем за рабочими лопатками:
ν_12 := R_г*T_12/p_12 explicit, ALL → 289.3*1.568*10^3/(1.102*10^6) = 0.411591
# Площадь кольцевого сечения за рабочими лопатками:
А_12 := π*D_2*l_л1 explicit, ALL → π*0.857*0.065 = 0.174997
# Осевая скорость за рабочими лопатками:
с_12а := G_г*ν_12/А_12 explicit, ALL → 56.51*0.412/0.175 = 132.911
# Угол выхода потока из рабочих лопаток:
β_12 := asin(с_12а/w_12)/deg explicit, ALL → asin(132.911/353.731)/deg = 22.07
# Скорость закрутки потока за рабочими лопатками:
с_12u := w_12*cos(β_12*deg) - u_2 explicit, ALL → 353.731*cos(22.07*deg) - 494.98 = -167.168
# Угол выхода потока из рабочих лопаток:
α_12 := atan(с_12а/с_12u)/deg explicit, ALL → atan(132.911/(-167.168))/deg = -38.4872
# Скорость газа за рабочими лопатками:
с_12 := sqrt(с_12а^2 + с_12u^2) explicit, ALL → sqrt(132.911^2 + (-167.168)^2) = 213.566
# Работа на окружности РК:
L_1u := u_1*с_12u + c_11u*u_2 explicit, ALL → 494.98*(-167.168) + 649.27*494.98 = 238631
# КПД на окружности РК:
η_1u := L_1u/H_01 explicit, ALL → 2.386*10^5/(2.827*10^5) = 0.843985
# Удельные параметры за СА:
h_1c := (φ_1^-2 - 1)*c_11^2/2 explicit, ALL → (0.967^-2 - 1)*670.42^2/2 = 15600.2
# То же, с учетом их использования в РК:
h'_1c := h_1c*T'_12/T_11 explicit, ALL → 1.56*10^4*1.563*10^3/(1.597*10^3) = 15272.2
# Относительные потери в СА:
ξ_1с := h_1c/H_01 explicit, ALL → 1.56*10^4/(2.827*10^5) = 0.0551744
# То же, с учетом их использования в рабочих лопатках:
ξ'_1c := ξ_1с*T'_12/T_11 explicit, ALL → 0.055*1.563*10^3/(1.597*10^3) = 0.0540143
# Удельные потери в рабочих лопатках:
h_1л := (ψ_1^-2 - 1)*w_12^2/2 explicit, ALL → (0.955^-2 - 1)*353.731^2/2 = 6034.89
# Относительные потери в рабочих лопатках:
ξ_1л := h_1л/H_01 explicit, ALL → 6.035*10^3/(2.827*10^5) = 0.0213441
# Удельные потери с выходной скоростью:
h_1в := с_12^2/2 explicit, ALL → 213.566^2/2 = 22805.2  # Дж/кг
# Относительные потери с выходной скоростью:
ξ_1в := h_1в/H_01 explicit, ALL → 2.281*10^4/(2.827*10^5) = 0.080657
# КПД на окружности РК:
η_1u := 1 - ξ'_1c - ξ_1л - ξ_1в explicit, ALL → 1 - 0.054 - 0.021 - 0.081 = 0.843985
# Радиальный зазор между корпусом и сопловыми лопатками:
δ_1с := 0.8*10^-3 = 0.0008  # м
# Радиальный зазор между корпусом и рабочими лопатками:
δ_1л := 0.8*10^-3 = 0.0008  # м
# Удельные потери в радиальном зазоре:
h_1з := 1.37*(1 + 1.6*ρ_1)*(1 + l_л1/D_т)*δ_1л/l_л1*L_1u = 5367.8  # Дж/кг
# Относительные потери в радиальном зазоре:
ξ_1з := h_1з/H_01 explicit, ALL → 5.368*10^3/(2.827*10^5) = 0.0189847
# Удельная работа ступени с учетом потери в радиальном зазоре:
L_uз := L_1u - h_1з explicit, ALL → 2.386*10^5 - 5.368*10^3 = 233263  # Дж/кг
# Мощностной КПД ступени:
η'_1т := η_1u - ξ_1з explicit, ALL → 0.844 - 0.019 = 0.825
# Лопаточный КПД ступени:
η'_1л := η'_1т + ξ_1в explicit, ALL → 0.825 + 0.081 = 0.905657
# Площадь открытой части соплового аппарата
ε := 1
# Средняя плотность газа  с обеих сторон диска
ρ_1cp := (ν_11^-1 + ν_12^-1)/2 explicit, ALL → (0.382^-1 + 0.412^-1)/2 = 2.5246  # кг/м^3
# Затраты мощности на трение и вентиляцию:
N_1т.в := (1.07*D_т^2 + 61*(1 - ε)*D_т*l_л1)*(u_1/100)^3*ρ_1cp = 240.589
# Удельные потери на трение и вентиляцию:
h_1т.в := N_1т.в*1000/G_г explicit, ALL → 240.589*1*10^3/56.51 = 4257.47  # Дж/кг
# Относительные потери на трение и вентиляцию:
ξ_1т.в := h_1т.в/H_01 explicit, ALL → 4.257*10^3/(2.827*10^5) = 0.0150577
# Мощностной КПД ступени с учетом потери на трение и вентиляцию:
η_1т := η'_1т - ξ_1т.в explicit, ALL → 0.825 - 0.015 = 0.809942
# Лопаточный КПД ступени с учетом потери на трение и вентиляцию:
η_1л := η'_1л - ξ_1т.в explicit, ALL → 0.906 - 0.015 = 0.890599
# Удельная работа ступени:
L_1т := H_01*η_1т explicit, ALL → 2.827*10^5*0.81 = 229005  # Дж/кг
# Температура за первой ступенью:
T'_ст1 := T_12 + h_1з/C_pг + h_1т.в/C_pг explicit, ALL → 1.568*10^3 + 5.368*10^3/(1.273*10^3) + 4.257*10^3/(1.273*10^3) = 1575.23  # К
# Температура торможения за первой ступенью:
T*_ст1 := T'_ст1 + h_1в/C_pг explicit, ALL → 1.575*10^3 + 2.281*10^4/(1.273*10^3) = 1593.15  # К
# Давление торможения за первой ступенью:
p*_ст1 := p_12*(T*_ст1/T'_ст1)^(k_г/(k_г - 1)) explicit, ALL → 1.102*10^6*(1.593*10^3/(1.575*10^3))^(1.294/(1.294 - 1)) = 1158108  # Па
# Располагаемый теплоперепад по параметрам торможения:
H*_01 := C_pг*T*_г*(1 - (p*_ст1/p*_г)^((k_г - 1)/k_г)) explicit, ALL → 1.273*10^3*1.773*10^3*(1 - (1.158*10^6/(1.986*10^6))^((1.294 - 1)/1.294)) = 260289  # Дж/кг
# КПД ступени по параметрам торможения:
η*_1т := L_1т/H*_01 explicit, ALL → 2.29*10^5/(2.603*10^5) = 0.879811
# Уточнение коэффициентов скорости φ и ψ.
# Коэффициент скорости в сопловом аппарате первой ступени:
# Потери на трения
# Вход в турбину - осевой
α_0 := 90*deg
x := (α_11 + α_0)/deg explicit, ALL → (14.43*deg + 90*deg)/deg = 104.43
x_с :=
    x
    110 if x > 110
    = 104.43
y := sin(α_0)/sin(α_11) = 4.01289
y_с :=
    y
    1.7 if y > 1.7
    = 1.7
ζ_с.тр.1 := 0.02185*(0.01065*x_с^2 - 2.295*x_с + 160.5)*(0.1055*y_с^2 - 0.3427*y_с + 0.295) = 0.0139819
# Кромочные потери
# Угол установки профиля в СА
γ_11 := (70 - 0.127*(α_0 - α_11)/deg - 0.0041*((α_0 - α_11)/deg)^2) = 36.9882
# Хорда лопатки:
b_с11 := b_с1/sin(γ_11*deg) explicit, ALL → 0.043/sin(36.988*deg) = 0.072024  # м
# Оптимальный относительный шаг
K := 0.45
c'_max1 := 0.179
t/b_2.опт := K*(180/(180 - (α_0 + α_11)/deg)*sin(α_0)/sin(α_11))^(1/3)*(1 - c'_max1) = 0.78406
# Найдем шаг решетки
t_c1 := t/b_2.опт*b_с11 explicit, ALL → 0.784*0.072 = 0.0564711
# Диаметр кромки соплового аппарата
s_с1 := 2*10^-3
# Относительные кромочные потери в сопловом аппарате
ζ_с.кр1 := 0.2*s_с1/(t_c1*sin(α_11)) explicit, ALL → 0.2*2*10^-3/(0.056*sin(14.43*deg)) = 0.0284244
# Профильные потери в сопловом аппарате
ζ_с.пр1 := ζ_с.тр.1 + ζ_с.кр1 explicit, ALL → 0.014 + 0.028 = 0.0424063
# Концевые потери
ζ_с.к1 := 2*ζ_с.тр.1*t_c1*sin(α_11)/l_c1 explicit, ALL → 2*0.014*0.056*sin(14.43*deg)/0.048 = 0.00820514
# Суммарные потери в сопловом аппарате первой ступени
ζ_с1 := ζ_с.пр1 + ζ_с.к1 explicit, ALL → 0.042 + 8.205*10^-3 = 0.0506114
# Коэффициент скорости
φ_1У := sqrt(1 - ζ_с1) explicit, ALL → sqrt(1 - 0.051) = 0.974366
# Коэффициент скорости в рабочем колесе первой ступени
# Потери на трение
x := β_12 + β_11 = 69.3468
x :=
    x
    110 if x > 110
    = 69.3468
y := sin(β_11*deg)/sin(β_12*deg) = 1.95519
y :=
    y
    1.7 if y > 1.7
    = 1.7
ζ_тр.1 := 0.02185*(0.01065*x^2 - 2.295*x + 160.5)*(0.1055*y^2 - 0.3427*y + 0.295) = 0.0198755
# Угол установки профиля в РК:
γ_1рк := (70 - 0.127*(β_11 - β_12) - 0.0041*(β_11 - β_12)^2) = 64.1937
# Хорда лопатки:
b_л11 := b_л1/sin(γ_1рк*deg) explicit, ALL → 0.0361/sin(64.1937*deg) = 0.0401114
# Оптимальный относительный шаг
K := 0.6
c'_max2 := 0.3 = 0.3
t/b_1.опт := K*(180/(180 - (β_11 + β_12))*sin(β_11*deg)/sin(β_12*deg))^(1/3)*(1 - c'_max2) = 0.617658
# Найдем шаг решетки
t_1 := t/b_1.опт*b_л11 explicit, ALL → 0.618*0.04 = 0.0247751
# Диаметр кромки рабочего колеса
s_1 := 2*10^-3
# Относительные кромочные потери в рабочем колесе
ζ_кр1 := 0.2*s_1/(t_1*sin(β_12*deg)) explicit, ALL → 0.2*2*10^-3/(0.025*sin(22.07*deg)) = 0.0429693
# Профильные потери в рабочем колесе
ζ_пр1 := ζ_тр.1 + ζ_кр1 explicit, ALL → 0.02 + 0.043 = 0.0628448
# Концевые потери
ζ_к1 := 2*ζ_тр.1*t_1*sin(β_12*deg)/l_л1 explicit, ALL → 2*0.02*0.025*sin(22.07*deg)/0.065 = 0.00569294
# Суммарные потери в рабочем колесе первой ступени
ζ_1 := ζ_пр1 + ζ_к1 explicit, ALL → 0.063 + 5.693*10^-3 = 0.0685377
# Коэффициент скорости
ψ_1У := sqrt(1 - ζ_1) explicit, ALL → sqrt(1 - 0.069) = 0.965123
# Расход за первой ступенью:
G_г.вд2 := G_в*(1 + g_m)*(1 - g_ут - 0.4*(g_охл - 0.02) - 0.02) = 57.5887  # кг/с
H*_т := C_pг*T*_г*(1 - (p*_ст1/p*_г)^((k_г - 1)/k_г)) explicit, ALL → 1.273*10^3*1.773*10^3*(1 - (1.158*10^6/(1.986*10^6))^((1.294 - 1)/1.294)) = 260289  # Дж/кг
# Мощностной КПД турбины
η_т := L_1т/Н_т explicit, ALL → 2.29*10^5/(5.35*10^5) = 42.8159 %
# Лопаточный КПД турбины
η_л := (L_1т + h_1в)/Н_т explicit, ALL → (2.29*10^5 + 2.281*10^4)/(5.349*10^5) = 47.0796 %
# КПД турбины по параметрам торможения:
η*_т := L_1т/H*_т explicit, ALL → 2.29*10^5/(2.6*10^5) = 87.9811 %
